/*!
 * \file   DruckerPrager.mfront
 * \brief  résolution implicite d'une loi de Drucker-Prager
 * \author Helfer Thomas
 * \date   18/11/2013
 */

@Parser    Implicit;
@Behaviour DruckerPrager;

@Theta 1.;
@Epsilon 1.e-8;

@MaterialProperty stress young;
young.setGlossaryName("YoungModulus");
@MaterialProperty real nu;
nu.setGlossaryName("PoissonRatio");

// ratio between the stress limit in traction and compression
@MaterialProperty stress tau;
// limit in compression
@MaterialProperty stress sigc;

@StateVariable real p;
p.setGlossaryName("EquivalentPlasticStrain");

@LocalVariable stress a;
@LocalVariable stress k;

@LocalVariable stress K;
@LocalVariable stress lambda;
@LocalVariable stress mu;

@Includes{
#include"TFEL/Material/Lame.hxx"
}

/* Initialize Lame coefficients */
@InitLocalVariables{
  using namespace tfel::material::lame;
  lambda = computeLambda(young,nu);
  mu     = computeMu(young,nu);
  K      = lambda+(2*mu)/3;
  a      = -3*(tau-1)/(tau+1);
  k      = 2*sigc*tau/(tau+1);
}

@ComputeStress{
  sig = lambda*trace(eel)*StrainStensor::Id()+2*mu*eel;
}

@Integrator{
  const stress seq_ = sigmaeq(sig);
  const stress pr_  = trace(sig)/3.;
  StrainStensor n_(real(0));
  if(seq_>1.e-8*young){
    n_ = 3/(2*seq_)*deviator(sig);
  }
  cout << "n_" << n_ << endl;

  // elasticity
  StrainStensor np_ = a*StrainStensor::Id()+n_;
  cout << "np_  :" << np_ << endl;
  cout << "dp   :" << dp<< endl;
  cout << "deto :" << deto<< endl;
  cout << "deel :" << deel<< endl;
  feel = deel+dp*np_-deto;
  cout << "feel :" << feel << endl;
  cout << "seq  :" << seq_ << endl;
  cout << "young:" << 1.e-8*young<< endl;
  if(seq_>1.e-8*young){
    dfeel_ddeel += (2*mu*theta*dp/seq_)*(Stensor4::M()-(n_^n_));
  }
  dfeel_ddp = np_;
  // plasticity
  const strain f = (a*pr_+seq_-k)/young;


  if((f>0)||(dp>epsilon)){
    fp = f;
    dfp_ddp   = 0;
    dfp_ddeel = (a*K*StrainStensor::Id()+2*mu*n_)*theta/young;
  }
}

@TangentOperator{
  using namespace tfel::material::lame;
  if((smt==ELASTIC)||(smt==SECANTOPERATOR)){
    computeAlteredElasticStiffness<hypothesis,Type>::exe(Dt,lambda,mu);
  } else if (smt==CONSISTENTTANGENTOPERATOR){
    StiffnessTensor De;
    Stensor4 Je;
    computeElasticStiffness<N,Type>::exe(De,lambda,mu);
    getPartialJacobianInvert(Je);
    Dt = De*Je;
  } else {
    return false;
  }
}
